clear

redirect fonte.txt
redirect arranjo.txt
redirect linhas.txt
redirect linhas_cargas.txt

new loadshape.semana

redirect carga.txt

new loadshape.storagecurve npts=24 interval=1 mult=(0 0 -1 -1 -1 -1 -1 -1 0 0 0 0 0 0 0 0 0 0 0 0.8 0.9 0.94 1 0.94 0)

new storage.batery phases=3 bus1=c kv=0.22 kwrated=15 kwhrated=60 dispmode=follow daily=storagecurve

redirect mypvsyst.txt

set voltagebases=0.22
calc voltagebases

new monitor.monitor_power_batery_sim6 element=storage.batery mode=1 ppolar=no
new monitor.monitor_power_line_sim6 element=line.linha1 mode=1 ppolar=no terminal=1
new monitor.monitor_voltage element=line.linha1 mode=0
new monitor.monitor_power_line2_sim6 element=line.linha2 mode=1 ppolar=no terminal=2
!new monitor.monitor_power_pv_sim6 element=transformer.pv_up terminal=1 mode=1 ppolar=no
!new monitor.monitor_power_load_sim6 element=load.carga mode=1 ppolar=no

set mode=daily
set stepsize=1h
set number=24
solve

Export monitors monitor_power_batery_sim6
!Plot monitor object= monitor_power channels=(1 3 5 )
Export monitors monitor_power_line_sim6
!Plot monitor object= monitor_power2 channels=(1 3 5 )
Export monitors monitor_power_line2_sim6
!Plot monitor object= monitor_power3 channels=(1 3 5 )
!Export monitors monitor_power_pv_sim6
!Plot monitor object= monitor_power_pv_sim6 channels=(1 3 5)
!Export monitors monitor_voltage
!Plot monitor object= monitor_voltage channels=(1 3 5 )
!Export monitors monitor_power_load_sim6
